*Heading
** Job name: Job-7 Model name: Model-2
** Generated by: Abaqus/CAE 2022
*Preprint, echo=NO, model=NO, history=NO, contact=NO
**
** PARTS
**
*Part, name=PART-1
*Node
      1,           0.,          45.
      2,          20.,          45.
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*Element, type=CPE4
  1,   1,  13, 201,  52
  2,  13,  14, 202, 201
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*Elset, elset=Set-1
   1,   2,   3,   4,   5,   6
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*Elset, elset=Set-2
 121, 122, 123, 124, 125, 126
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** Section: Section-1
*Solid Section, elset=Set-1, material=Material-1
,
** Section: Section-2
*Solid Section, elset=Set-2, material=Material-2
,
*End Part
**
**
** ASSEMBLY
**
*Assembly, name=Assembly
**
*Instance, name=PART-1-1, part=PART-1
*End Instance
**
*Nset, nset=Set-1, instance=PART-1-1
 154,
*End Assembly
*Amplitude, name=Amp-1
             0.,              0.,           0.001,              1.
**
** MATERIALS
**
*Material, name=Material-1
*Density
2000.,
*Elastic
 2.08e+08, 0.3
*Material, name=Material-2
*Density
2000.,
*Elastic
 4.68e+08, 0.3
** ----------------------------------------------------------------
**
** STEP: Step-1
**
*Step, name=Step-1, nlgeom=NO, unsymm=YES
*Dynamic,direct,nohaf
0.01,0.02,
**
** LOADS
**
** Name: Load-1   Type: Concentrated force
*Cload, amplitude=Amp-1
Set-1, 1, 1.
**
** OUTPUT REQUESTS
**
*Restart, write, frequency=0
**
** FIELD OUTPUT: F-Output-1
**
*Output, field, variable=PRESELECT
**
** HISTORY OUTPUT: H-Output-1
**
*Output, history, variable=PRESELECT
*End Step
** Output Global Stiffness Matrix
*Step, name=Global_Stiffness_Matrix
*MATRIX GENERATE, STIFFNESS
*MATRIX OUTPUT, STIFFNESS, FORMAT=MATRIX INPUT
*End Step
** Output Global Mass Matrix
*Step, name=Global_Mass_Matrix
*MATRIX GENERATE, MASS
*MATRIX OUTPUT, MASS, FORMAT=MATRIX INPUT
*End Step
