*Heading
** Job name: Job-2 Model name: Model-1
** Generated by: Abaqus/CAE 2022
*Preprint, echo=NO, model=NO, history=NO, contact=NO
**
** PARTS
**
*Part, name=Part-1
*Node
      1,           0.,          45.
      2,          20.,          45.
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*USER ELEMENT, NODES=4, TYPE=U1002, PROPERTIES=4, COORDINATES=2, VARIABLES=1240
1,2,21,22,23
*Element, type=CPE4
 *include, input=read/element_set1.txt
*Element, type=U1002, elset=Set-22
 *include, input=read/element_set2.txt
***1参考波速C_ref 2平均厚度 3pml单元大小 4泊松比 5密度 6剪切模量
*UEL PROPERTY, ELSET=Set-22
550.0, 4.0, 0.4, 0.26, 2000.0, 605000000.0
*Nset, nset=Set-19
   1,   2,   3,   4,   7,   8
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*Elset, elset=Set-19
   1,   2,   3,   4,   5,   6
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*Nset, nset=Set-20
   1,   2,   5,   6,   7,   8
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*Elset, elset=Set-20
 121, 122, 123, 124, 125, 126
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*Elset, elset=element_set1
  10,  20,  30,  40,  50,  60
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*Elset, elset=element_set2
   1,   2,   3,   4,   5,   6
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*Nset, nset=node_set1
   2,   3,   6,   7,  10,  12
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*Nset, nset=node_set2
   1,   4,   5,   8,   9,  11
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*Nset, nset=cross
  21,  33,  61,  84, 112, 132
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*Nset, nset=fixnode
   1,   4,   5,   8,   9,  11
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*Elset, elset=pml1
   1,   2,   3,   4,   5,   6
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*Elset, elset=pml2
 121, 122, 123, 124, 125, 126
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*Elset, elset=m1
  10,  20,  30,  40,  50,  60
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*Elset, elset=m2
 130, 140, 150, 160, 170, 180
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** Section: Section-1
*Solid Section, elset=m1, material=Material-1
,
** Section: Section-2
*Solid Section, elset=m2, material=Material-2
,
*End Part
**
*Part, name=Part-2
*Node
      1,          45.,          45.
      2,          70.,          45.
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*Element, type=CPE4
  1,   1,  10, 142,  53
  2,  10,  11, 143, 142
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*Nset, nset=Set-9
   1,   2,   3,   4,   7,   8
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*Elset, elset=Set-9
   1,   2,   3,   4,   5,   6
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*Nset, nset=Set-10
   1,   2,   5,   6,   7,   9
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*Elset, elset=Set-10
 145, 146, 147, 148, 149, 150
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** Section: Section-1
*Solid Section, elset=Set-9, material=Material-1
,
** Section: Section-2
*Solid Section, elset=Set-10, material=Material-2
,
*End Part
**
**
** ASSEMBLY
**
*Assembly, name=Assembly
**
*Instance, name=Part-1-1, part=Part-1
*End Instance
**
*Instance, name=Part-2-1, part=Part-2
*End Instance
**
*Nset, nset=Set-1, instance=Part-2-1
 4,
*Nset, nset=Set-2, instance=Part-1-1
   1,   4,   5,   8,   9,  11
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*Elset, elset=Set-2, instance=Part-1-1
   1,  11,  21,  31,  41,  51
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*Elset, elset=_m_Surf-1_S2, internal, instance=Part-2-1
  12,  24,  36,  48,  60,  72
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*Elset, elset=_m_Surf-1_S3, internal, instance=Part-2-1
 277, 278, 279, 280, 281, 282
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*Elset, elset=_m_Surf-1_S4, internal, instance=Part-2-1, generate
 289,  421,   12
*Surface, type=ELEMENT, name=m_Surf-1
_m_Surf-1_S2, S2
_m_Surf-1_S3, S3
_m_Surf-1_S4, S4
*Elset, elset=_s_Surf-1_S2, internal, instance=Part-1-1
  10,  20,  30,  40,  50,  60
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*Elset, elset=_s_Surf-1_S4, internal, instance=Part-1-1
 241, 251, 261, 271, 281, 291
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*Surface, type=ELEMENT, name=s_Surf-1
_s_Surf-1_S2, S2
_s_Surf-1_S4, S4
** Constraint: Constraint-1
*Tie, name=Constraint-1, adjust=no, no rotation
s_Surf-1, m_Surf-1
*End Assembly
*Amplitude, name=Amp-1
             0.,              0.,          0.0002,              0.,          0.0004,              0.,          0.0006,              0.
         0.0008,              0.,           0.001,       -10.06064,          0.0012,       -10.18351,          0.0014,        -10.3078
         0.0016,       -10.43353,          0.0018,       -10.56071,           0.002,       -10.68936,          0.0022,       -10.81949
         0.0024,       -10.95112,          0.0026,       -11.08427,          0.0028,       -11.21895,           0.003,       -11.35517
         0.0032,       -11.49296,          0.0034,       -11.63234,          0.0036,       -11.77331,          0.0038,       -11.91589
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         0.7472,       -10.18351,          0.7474,       -10.06064,          0.7476,              0.,          0.7478,              0.
**
** MATERIALS
**
*Material, name=Material-1
*Density
2000.,
*Elastic
 2.08e+08, 0.3
*Material, name=Material-2
*Density
2000.,
*Elastic
 4.68e+08, 0.3
** ----------------------------------------------------------------
**
** STEP: Step-1
**
*Step, name=Step-1, nlgeom=NO, inc=100000, unsymm=YES
*Dynamic,direct,nohaf
0.004,3.,
**
** BOUNDARY CONDITIONS
**
** Name: BC-1 Type: Symmetry/Antisymmetry/Encastre
*Boundary
Set-2, ENCASTRE
**
** LOADS
**
** Name: Load-1   Type: Concentrated force
*Cload, amplitude=Amp-1
Set-1, 2, -1.
**
** OUTPUT REQUESTS
**
*Restart, write, frequency=0
**
** FIELD OUTPUT: F-Output-1
**
*Output, field, frequency=1
*Node Output
U,
**
** HISTORY OUTPUT: H-Output-1
**
*Output, history, variable=PRESELECT
*End Step
